# Muller-Plathe method via fix thermal_conductivity

# Initialization
units           real
dimension       3
boundary        p p p
atom_style      full
timestep        0.5   # fs

# settings

# variable        x equal 10
# variable        y equal 10
# variable        z equal 20

# variable        rho equal 0.6
variable        T equal 300.0
# variable        rc equal 2.5

#variable       rho equal 0.85
#variable        t equal 0.7
#variable       rc equal 3.0

variable FF string "SiOCHN_2018.ff C H O Si"   # force field args for pair_coeff
# pair_coeff * * CHONSSi.ff O Si
# pair_coeff * * CHOSiNa.ff O Si
# pair_coeff * * SiOCHN_2018.ff O Si
# pair_coeff * * PDMSDecomp.ff Si O
# pair_coeff * * CHONSi.ff C H O Si
# pair_coeff * * CHOFe.ff O Si

variable structure string ../0.lmpdata/333U-50C-5
# Read the initial sctructure
# box tilt large
read_data       ${structure}.data

# Assign the force field
pair_style reaxff NULL safezone 3.0 mincap 150
pair_coeff * * ${FF}

# charge method for reaxff
fix myqeq all qeq/reaxff 1 0.0 10.0 1.0e-6 reaxff maxiter 400
# Setup neighbor style
neighbor        2 bin
neigh_modify    every 10 delay 0 check no

velocity        all create $T 87287

# 1st equilibration run

fix             1 all nvt temp $T $T 50.0
thermo          100
run             1000

velocity        all scale $T

unfix           1

# 2nd equilibration run

compute         ke all ke/atom
variable        temp atom c_ke/1.5

fix             1 all nve

compute         layers all chunk/atom bin/1d z lower 0.05 units reduced
fix             2 all ave/chunk 10 100 1000 layers v_temp file profile.mp
fix             3 all thermal/conductivity 10 z 20

variable        tdiff equal f_2[11][3]-f_2[1][3]
thermo_style    custom step temp epair etotal f_3 v_tdiff
thermo_modify   colname f_3 E_delta colname v_tdiff dTemp_step

thermo          1000
run             20000

# thermal conductivity calculation
# reset fix thermal/conductivity to zero energy accumulation
fix             3 all thermal/conductivity 10 z 20

variable start_time equal time
variable kappa equal (f_3/(time-${start_time})/(lx*ly)/2.0)*(lz/2.0)/f_ave

fix             ave all ave/time 1 1 1000 v_tdiff ave running
thermo_style    custom step temp epair etotal f_3 v_tdiff f_ave
thermo_modify   colname f_3 E_delta colname v_tdiff dTemp_step colname f_ave dTemp

run             2000 # 20000
print           "Running average thermal conductivity: $(v_kappa:%.2f)"
